a := 3
d/dx(sin(k*x/a^2)) → k*cos(k*x/9)/9
x := sin(π/6) + 2 = 2.5
x = 2.5
x := sqrt(3) = 1.73205
x → 1.73205080757
y := sqrt(3)
y → sqrt(3)
f(x) := x^2 - 3*x - 2
f(0) = -2
f(10) = 68
a := 1000
b := 1.3474
c := 3124.1
d := 45.21*10^-5
g(a, y, ϕ) := a*sin(y + ϕ)
g(1, 0, π) = 1.22461e-16
a := 2i + 0.5
a = 0.5 + 2i
b := 1.77*e^2i
b = -0.73658 + 1.60946i
c := 25j + 12
c = 12 + 25i
Im(a) = 2
Re(a) = 0.5
|a| = 2.06155
arg(a) = 1.32582
arg(b) = 2
|b| = 1.77
s := "Hello"
concat(s, "word!") = "Helloword!"
a
a := [14; 1.4; 4.7]
Ι := 10. A
U := 110. V
R := U/Ι
R = 11 Ω
37
V := 40. km/hr
V = 11.1111 m/s
SIUnitsOf(V) = 1 m/s
t := 10°*c
t = 2.0944 + 4.36332i
t - 10°*c = 0
20°*f - 10°*f = -0.432214
f(x) :=
    "negative"
    "positive"
    "zero"  # if
x < 0
if
x > 0
otherwie
f(xx) := sin(xx)*ln(xx)
d/dxx(f(xx)) → sin(xx)/xx + cos(xx)*ln(xx)
f(m) := sin(m)*ln(m)
m := 2
d/dm(f(m)) → sin(2)/2 + cos(2)*ln(2)
d/dl(sin(l)) → cos(l)
d/dl(sin(2)) → 0
