x[0] := -2
limit((3*x^2 + 5*x - 8)/(2*x^2 + 3*x - 5), x → x[0]) → 2
x[0] := 1
limit((3*x^2 + 5*x - 8)/(2*x^2 + 3*x - 5), x → x[0]) → 11/7
x[0] := ∞
limit((3*x^2 + 5*x - 8)/(2*x^2 + 3*x - 5), x → x[0]) → 3/2
limit(sin(x)^3/x^3, x → 0) → 1
(II)
y1(t) := t^5*ln(5*t)
d/dt(y1(t)) → t^4 + 5*t^4*ln(5*t)
y2(l) := (1 + e^l)/(1 - e^l)
d/dl(y2(l)) → e^l*(e^l + 1)/(e^l - 1)^2 - e^l/(e^l - 1)
y3(m) := 2*e^m + 3^m + 7*tan(m) - 3*m^2
d/dm(y3(m)) → 7*tan(m)^2 - 6*m + 2*e^m + 3^m*ln(3) + 7
III
y(xl) := 1/3*(xl^3 - 8*xl^2 + 5*xl + 14)
d/dxl(1/3*(xl^3 - 8*xl^2 + 5*xl + 14)) solve → [5; 1/3]
d/dxl(1/3*(xl^3 - 8*xl^2 + 5*xl + 14)) > 0 solve → 5 < xl or xl < 1/3
d/dxl(1/3*(xl^3 - 8*xl^2 + 5*xl + 14)) < 0 solve → 1/3 < xl < 5
# [plot: y(xl) vs xl]
y(1/3) → 400/81
y(5) → -12
d^2/dxl^2(1/3*(xl^3 - 8*xl^2 + 5*xl + 14)) > 0 solve → 8/3 < xl
d^2/dxl^2(1/3*(xl^3 - 8*xl^2 + 5*xl + 14)) < 0 solve → xl < 8/3
y(8/3) = -3.53086
IV.
integral((3 + 4*xx)^8, xx) → (4*xx + 3)^9/36
integral(xx^2*cos(xx), xx) → xx^2*sin(xx) - 2*sin(xx) + 2*xx*cos(xx)
V.
integral(e^(2*x), x = 0 .. 2) = 26.7991
integral(atan(x), x = 0 .. sqrt(3)) → π*sqrt(3)/3 - ln(2) = 1.12065
