x := 1
f(x) := x^2 - 3*x - 2
f(0) = -2
x = 1
f(10) = 68
(x + 5)^2 = 36
g(a, y, ϕ) := a*sin(y + ϕ)
x := sin(π/6) + 2 = 2.5
g(1, 0, π) = 1.22461e-16
x = 2.5
x := sqrt(3) = 1.73205
y := sqrt(3)
a := 2i + 0.5
a = 0.5 + 2i
b := 1.77*e^2i
b = -0.73658 + 1.60946i
c := 25j + 12
c = 12 + 25i
Re(a) = 0.5
Im(a) = 2
|a| = 2.06155
arg(a) = 1.32582
arg(b) = 2
|b| = 1.77
i
|a| = 2.06155
s := [12; 21; 12; 33] = [12; 21; 12; 33]
s[0] = 12
A[1, 1] =  # error: Эту операцию можно выполнять только с массивами.
A := [12, 54, 45; 3, 45, 23; 4, 5, 55]
